// COMSOL Multiphysics 4.3a (Build: 161) model "chipwflanges.mph"
// Outline of the model tree

Parameters
  H = 2*10^-3  // Height
  W = 20*10^-3  // Width
  L = 20*10^-3  // Length
  P = 30  // Power
  kSi = 3.6  // Thermal conductivity Si
  V = H*L*W  // Volume
  Q = 3.75E7  // Heat source
  hcoef = 100  // Heat transfer coef.
  Text = 20  // Temp. ext.
  Bi = H*hcoef/kSi  // Biot number

Probes
  dom1: Domain "Domain Probe 1" on all domains | type = maximum; expr = u; table = tbl1

Geometry
  geom1 "Geometry 1" (3D, length unit m)
    blk1: Block | size = {W, L, H}
    fin: Finalize "Form Union"

Physics
  c: CoefficientFormPDE on all domains
    dependent variable u
    cfeq1: CoefficientFormPDE (default) | c = kSi; f = Q; da = 1
    zflx1: ZeroFluxBoundary "Zero Flux 1" (default)
    init1: init "Initial Values 1" (default)
    flux1: FluxBoundary "Flux/Source 1" on boundaries 1, 2, 4-6 | g = hcoef*Text; q = hcoef
    zflx2: ZeroFluxBoundary "Zero Flux 2" on boundaries 3

Mesh
  mesh1 "Mesh 1" (physics-controlled)
    size: MeshSizeDefault | hauto = 5

Studies
  std1 "Study 1"
    param: Parametric "Parametric Sweep" | pname = W; plistarr = 20/1000, 10/1000, 1/1000, 0.2/1000
    stat: Stationary

Solver configurations
  sol1 "Solver 1" (study std1)
    v1: Variables "Dependent Variables 1"
    s1: Stationary "Stationary Solver 1"
      dDef: Direct
      fc1: FullyCoupled
  sol2 "Parametric 2" (study std1)

Datasets
  dset1: Solution | solution = sol1
  dset2: Solution | solution = sol2
  dset3: Solution "Probe Solution 3" | solution = sol1
  max1: Maximum "Domain Probe 1" on domains 1 | data = dset3

Derived values
  max1: MaxVolume "Volume Maximum 1" | data = dset1; expr = u
  pev1: EvalPoint "Domain Probe 1" | data = max1; table = tbl1; expr = u

Tables
  tbl1: Table "Probe Table 1"
    W | Dependent variable u (1), Domain Probe 1
    0.02 | 621.162
    0.01 | 536.208
    0.001 | 170.662
    0.0002 | 56.0633

Plots
  pg1: PlotGroup3D "3D Plot Group 1" | data = dset1
    slc1: Slice | expr = u; genpoints = {{0, 0, 0}, {1, 0, 0}, {0, 1, 0}}
  pg2: PlotGroup3D "3D Plot Group 2" | data = dset2
    slc1: Slice | expr = u; genpoints = {{0, 0, 0}, {1, 0, 0}, {0, 1, 0}}
  pg3: PlotGroup1D "Probe 1D Plot Group 3"
  pg4: PlotGroup1D "Probe 1D Plot Group 4"
    tblp1: Table "Probe Table Graph 1" | table = tbl1; plotcolumns = 2