// COMSOL Multiphysics 5.1.0.234 model "comsol_1.mph"
// Outline of the model tree

Probes
  pdom1: DomainPoint "Domain Point Probe 1"
    ppb1: PointExpr "Point Probe Expression 1" | expr = T; unit = 1; table = tbl1

Geometry
  geom1 "Geometry 1" (2D, length unit m)
    r1: Rectangle | pos = {0, 0}; type = solid; base = corner; size = {3.999999833107, 2.0000000596046}
    fin: Finalize "Form Union"

Physics
  c: CoefficientFormPDE on domains 1
    dependent variable T
    cfeq1: CoefficientFormPDE (default) | c = {1, 0, 0, 1}; f = 1500*exp(-5*(x-2)^2-10*(y-0.5)^2); da = 1
    zflx1: ZeroFluxBoundary "Zero Flux 1" (default)
    init1: init "Initial Values 1" (default)
    dir1: DirichletBoundary "Dirichlet Boundary Condition 1" on boundaries 1 | r = 300
    dir2: DirichletBoundary "Dirichlet Boundary Condition 2" on boundaries 4 | r = 600

Mesh
  mesh1 "Mesh 1" (physics-controlled)
    size: MeshSizeDefault | hauto = 4

Studies
  std1 "Study 1"
    stat: Stationary

Solver configurations
  sol1 "Solution 1" (study std1)
    v1: Variables "Dependent Variables 1"
    s1: Stationary "Stationary Solver 1"
      dDef: Direct
      fc1: FullyCoupled | linsolver = dDef

Datasets
  dset1: Solution | solution = sol1
  dset2: Solution "Probe Solution 2" | solution = sol1
  cpt1: CutPoint2D "Domain Point Probe 1" | data = dset2; pointx = 2; pointy = 1

Derived values
  pev1: EvalPoint "Point Probe Expression 1" | data = cpt1; table = tbl1; expr = T

Tables
  tbl1: Table "Probe Table 1"
    Dependent variable T (1), Point Probe Expression 1
    731.454

Plots
  pg1: PlotGroup2D "2D Plot Group 1" | data = dset1
    surf1: Surface | expr = T
  pg2: PlotGroup1D "Probe Plot Group 2"
    tblp1: Table "Probe Table Graph 1" | table = tbl1