// COMSOL Multiphysics 5.1.0.234 model "comsol_2.mph"
// Outline of the model tree

Probes
  pdom1: DomainPoint "Domain Point Probe 1"
    ppb1: PointExpr "Point Probe Expression 1" | expr = u; unit = 1; table = tbl1
  pdom2: DomainPoint "Domain Point Probe 2"
    ppb2: PointExpr "Point Probe Expression 2" | expr = u; unit = 1; table = tbl1

Geometry
  geom1 "Geometry 1" (2D, length unit m)
    sq1: Square | pos = {0, 1}; size = 1
    sq2: Square | pos = {1, 1}; size = 1
    sq3: Square | pos = {1, 0}; size = 1
    fin: Finalize "Form Union" | action = union

Physics
  c: CoefficientFormPDE on all domains
    dependent variable u
    cfeq1: CoefficientFormPDE (default) | c = {1, 0, 0, 1}; f = 1500*exp(-5*(x-2)^2-10*(y-0.5)^2); da = 0
    zflx1: ZeroFluxBoundary "Zero Flux 1" (default)
    init1: init "Initial Values 1" (default)
    dir1: DirichletBoundary "Dirichlet Boundary Condition 1" on boundaries 1 | r = 300
    dir2: DirichletBoundary "Dirichlet Boundary Condition 2" on boundaries 5 | r = 600

Mesh
  mesh1 "Mesh 1"
    size: MeshSizeDefault | hmax = 0.134; hmin = 6.0E-4; hcurve = 0.3; hnarrow = 1; hgrad = 1.3; hauto = 5
    ftri1: FreeTri "Free Triangular 1" on domains 3 | xscale = 1; yscale = 1
    ftri2: FreeTri "Free Triangular 2" on remaining entities | xscale = 1; yscale = 1

Studies
  std1 "Study 1"
    stat: Stationary

Solver configurations
  sol1 "Solution 1" (study std1)
    v1: Variables "Dependent Variables 1"
    s1: Stationary "Stationary Solver 1"
      dDef: Direct
      fc1: FullyCoupled | linsolver = dDef

Datasets
  dset1: Solution | solution = sol1
  dset2: Solution "Probe Solution 2" | solution = sol1
  cpt1: CutPoint2D "Domain Point Probe 1" | data = dset2; pointx = 1; pointy = 1
  cpt2: CutPoint2D "Domain Point Probe 2" | data = dset2; pointx = 2; pointy = 2

Derived values
  pev1: EvalPoint "Point Probe Expression 1" | data = cpt1; table = tbl1; expr = u
  pev2: EvalPoint "Point Probe Expression 2" | data = cpt2; table = tbl1; expr = u

Tables
  tbl1: Table "Probe Table 1"
    Dependent variable u (1), Point Probe Expression 1 | Dependent variable u (1), Point Probe Expression 2
    523.557 | 536.742

Plots
  pg1: PlotGroup2D "2D Plot Group 1" | data = dset1
    surf1: Surface | expr = u
  pg2: PlotGroup1D "Probe Plot Group 2"
    tblp1: Table "Probe Table Graph 1" | table = tbl1